// COMSOL Multiphysics 5.0.1.276 model "double_dipole_in_waveguide_web.mph"
// Outline of the model tree

Parameters
  c = 299792458  // light speed in vacuum
  lambda = 1000e-9  // wavelength in vacuum
  frequency = c/lambda
  t_pml = 300e-9  // PML thickness
  radius_pml = 400e-9+t_pml  // outer radius of the spherical computational window
  eps_top = 1  // air (semi-infnite) -- upper cladding
  eps_mid = 2.25  // glass core
  eps_low = 1.44  // substrate (semi-infinte) -- lower cladding
  thickness = 200e-9  // the thickness of the glass core layer
  Lx = 300e-9  // box size for Radiation Pattern Calcu
  Ly = 100e-9  // box size for Radiation Pattern Calcu
  Lz = 300e-9  // box size for Radiation Pattern Calcu
  current = 5.1521e-14  // dipole amplitude
  x1 = -50e-9  // x-coordinate of # 1 dipole
  x2 = 50e-9  // x-coordinate of # 2 dipole
  block = 2000e-9  // a box used for constructing the three-layer configuration (see Geometry 1)

Coordinate systems
  pml1: PML "Perfectly Matched Layer 1" on domains 1-8, 15-22 | ScalingType = Spherical

Geometry
  geom1 "Geometry 1" (3D, length unit m)
    sph1: Sphere | layer = t_pml; r = radius_pml
    sph2: Sphere | layer = t_pml; r = radius_pml
    sph3: Sphere | layer = t_pml; r = radius_pml
    blk1: Block | base = center; size = {Lx, Ly, Lz}
    blk2: Block | pos = {0, 0, block/2+thickness/2}; base = center; size = {block, block, block}
    blk3: Block | pos = {0, 0, -(block/2+thickness/2)}; base = center; size = {block, block, block}
    int1: Intersection | input = blk2, sph1
    int2: Intersection | input = blk3, sph3
    pt1: Point | p = {-100e-9, 0, 0}
    pt2: Point | p = {50e-9, 0, 0}
    fin: Finalize "Form Union"

Materials
  mat1: Common "Material 1" on domains 7, 8, 11, 14, 18, 20
    def "Basic"
      relpermittivity = eps_top
      relpermeability = 1
      electricconductivity = 0
  mat2: Common "Material 2" on domains 1-4, 9, 13, 15, 16, 21, 22
    def "Basic"
      relpermittivity = eps_mid
      relpermeability = 1
      electricconductivity = 0
  mat3: Common "Material 3" on domains 5, 6, 10, 12, 17, 19
    def "Basic"
      relpermittivity = eps_low
      relpermeability = 1
      electricconductivity = 0

Physics
  emw: ElectromagneticWaves "Electromagnetic Waves, Frequency Domain" on all domains
    dependent variable E = {Ex, Ey, Ez}
    wee1: WaveEquationElectric (default)
    pec1: PerfectElectricConductor (default)
    init1: init "Initial Values 1" (default)
    sctr1: Scattering "Scattering Boundary Condition 1" on boundaries 2, 3, 5, 6, 12, 13, 17, 18, 43, 45, 49, 52, 59, 64, 72, 73
    epd1: ElectricPointDipole on points 15 | enpI = {1, 0, 1}; normpI = current
    epd2: ElectricPointDipole on points 32 | enpI = {0, 1, 0}; normpI = current

Mesh
  mesh1 "Mesh 1"
    size: MeshSizeDefault | hmax = 1.4E-7; hmin = 2.52E-8; hcurve = 0.6; hnarrow = 0.5; hgrad = 1.5; hauto = 5
    ftet1: FreeTet "Free Tetrahedral 1" on entire geometry
      size1: Size on domains 1-8, 15-22 | hauto = 4
      size2: Size on domains 13 | hauto = 1
      size3: Size on boundaries 29-33, 35, 36, 38-41, 74-76 | hmax = 1E-8; hauto = 1; custom = on
      size4: Size on points 15, 32 | hmax = 2.8E-8; hauto = 1; custom = off

Studies
  std1 "Study 1"
    freq: Frequency "Frequency Domain" | punit = Hz; plist = frequency