// COMSOL Multiphysics 5.0.1.276 model "sphere_in_air_web.mph"
// Outline of the model tree

Parameters
  c = 299792458  // light speed in vacuum
  lambda = 1500e-9  // wavelength in vacuum
  frequency = c/lambda
  radius_sph = 285e-9  // nanosphere radius
  t_pml = 400e-9  // PML thickness
  radius_pml = radius_sph+400e-9+t_pml  // out radius of the computational window
  eps_sph = 3.5*3.5  // relative permittivity of the nanosphere
  eps_air = 1  // relative permittivity of the air (background medium)
  box = radius_sph*2+100e-9  // box size for Radiation Pattern Calcu
  E0 = 1  // amplitude of the incident planewave

Coordinate systems
  pml1: PML "Perfectly Matched Layer 1" on domains 1-4, 8-11 | ScalingType = Spherical

Geometry
  geom1 "Geometry 1" (3D, length unit m)
    sph1: Sphere | r = radius_sph
    sph2: Sphere | layer = t_pml; r = radius_pml
    blk1: Block | base = center; size = {box, box, box}
    fin: Finalize "Form Union"

Materials
  mat1: Common "Material 1" on domains 1-6, 8-11
    def "Basic"
      relpermittivity = eps_air
      relpermeability = 1
      electricconductivity = 0
  mat2: Common "Material 2" on domains 7
    def "Basic"
      relpermittivity = eps_sph
      relpermeability = 1
      electricconductivity = 0

Physics
  emw: ElectromagneticWaves "Electromagnetic Waves, Frequency Domain" on all domains
    dependent variable E = {Ex, Ey, Ez}
    BackgroundField.SolveFor = scatteredField
    BackgroundField.Eb = {E0*exp(-i*emw.k0*z), 0, 0}
    wee1: WaveEquationElectric (default)
    pec1: PerfectElectricConductor (default)
    init1: init "Initial Values 1" (default)
    sctr1: Scattering "Scattering Boundary Condition 1" on boundaries 5-8, 25, 26, 33, 40

Mesh
  mesh1 "Mesh 1"
    size: MeshSizeDefault | hmax = 2.17E-7; hmin = 3.91E-8; hcurve = 0.6; hnarrow = 0.5; hgrad = 1.5; hauto = 5
    ftet1: FreeTet "Free Tetrahedral 1" on entire geometry
      size1: Size on domains 7 | hauto = 2
      size2: Size on domains 1-4, 8-11 | hauto = 5
      size3: Size on boundaries 13-17, 42 | hmax = 7.6E-8; hauto = 2; custom = off

Studies
  std1 "Study 1"
    freq: Frequency "Frequency Domain" | punit = Hz; plist = frequency